*Heading
 compression test specimen with ogden hyperelastic material
*Preprint, echo=NO, model=NO, history=NO, contact=NO
**
** model geometry
*Node
      1,           1.0,           1.0,           1.0
      2,           1.0,           0.0,           1.0
      3,           1.0,           1.0,           0.0
      4,           1.0,           0.0,           0.0
      5,           0.0,           1.0,           1.0
      6,           0.0,           0.0,           1.0
      7,           0.0,           1.0,           0.0
      8,           0.0,           0.0,           0.0
*Element, type=C3D8, elset=SolidSpecimen
1, 5, 6, 8, 7, 1, 2, 4, 3
*Solid Section, elset=SolidSpecimen, material=Rubber-Ogden
,
**
** node sets for boundary conditions
*Nset, nset=BottomFace
5, 6, 7, 8
*Nset, nset=SymmetricX
2, 4, 6, 8
*Nset, nset=SymmetricY
3, 4, 7, 8
*Nset, nset=MasterNodes
2, 3, 4
*Nset, nset=ControlNode
1
**
** amplitude definition
*Amplitude, name=RampAmp
0.0, 0.0
1.0, 1.0
**
** constitutive material definition
*Material, name=Rubber-Ogden
*Hyperelastic, ogden, n=2
0.8, 1.5, 0.2, -1.2, 0.001, 0.002
**
** initial boundary conditions
*Boundary
BottomFace, 3, 3, 0.0
SymmetricX, 1, 1, 0.0
SymmetricY, 2, 2, 0.0
**
** multi-point constraint equations
*Equation
2
MasterNodes, 1, 1.0, ControlNode, 1, -1.0
**
** static analysis step
*Step, name=CompressionStep, nlgeom=YES, inc=1000
*Static
0.01, 1.0, 1.0e-15, 0.05
*Boundary, amplitude=RampAmp
ControlNode, 3, 3, -0.25
*Controls, reset
*Controls, parameters=time incrementation
, , , , , , , 20, , ,
*Output, field, time interval=0.02
*Node Output
U, RF
*Element Output, directions=YES
LE, S, SDV
*End Step
